# Stock resonace and cohort resonance in the case of Moran-Ricker density-dependent SRR (Stock Recruitment Relation)
# Lifecycle parameters
d := 10  # d+1 - total number of cohorts
m := 5  # m - number of imatute cohorts, including zero cohort
λy := 0.85  # λy -survival of imature individuals
λs := 0.71  # λs -survival of mature individuals
a := 7.0  # a - slope at zero/SRR coefficient/proliferation rate
K := 10  # K -scale of stock size/SRR "carrying capacity"
# Lifecycle characteristics
L := λy^m*(1 - λs^(d - m + 1))/(1 - λs)
# L - lifetime reproductive potential (LRP), expected numbers of reproduction attempts (spawnings) for an individual at zero age
LRS := a*L  # LRS - lifetime reproductive success, expected numbers of recruits that an indivudual produces during lifespan/ replacement rate/ R0
Lin := λy^m/(1 - λs)  # Lin - LRP in the case of infinite numbers of cohorts d->inf
# Equilibrium population for Ricker SRR model (theory)
# Characteristic polynom of the Jacobian matrix for linear deviations from equilibrium
ν(λ) := λ^d - (1 + Er^-1)*sum(P[i]*λ^(d - i), i = 1 .. d)  # error: This variable is undefined.
N0R := ln(a*L)*K/L  # Equilibrium zero cohort population
ST := N0R*L  # Equilibrium stock size population
# Magnitude of the maximal eigenvalue
# Er - Elastisity of SRR at equilibrium, |Er|>1 means elastic range SRR (compensatory density-dependence), |Er|<1 means inelastic range SRR (over-compensatory density-dependence)
Maxlym(λs, λy) :=
    for i ∈ 0 .. m
        P[i] ← 0
    for i ∈ m .. d
        P[i] ← λs^(i - m)*(1 - λs)/(1 - λs^(d - m + 1))
    for i ∈ 0 .. d - 1
        v[i] ← -(1 - ln(a*(λy^m*(1 - λs^(d - m + 1))/(1 - λs))))*P[d - i]
    v[d] ← 1
    r ← polyroots(v)
    maxr ← max(sqrt(Re(r)^2 + Im(r)^2))
    return maxr
Er := -1/ln(a*L)
# Cohort equlibrium sizes XSi and cohort weights Pi
i := 0 .. m
XS[i] := λy^i*N0R
P[i] := 0
i := m .. d
XS[i] := λy^m*λs^(i - m)*N0R
P[i] := λy^m*λs^(i - m)/L
Tage := sum(i*P[i], i = 0 .. d)  # Tage - Average age of reproduction/ generation time
# Leslie Matrix M
# DEP ( Dominant eigenvalue λs-λy contour plot) of dynamic regimes
i := 0 .. d
MM[i, i] := 0
i := m .. d
MM[0, i] := 1
# Orange colour - magnitude of the maximum eigenvalue(s) bigger tnan 1
# Yellow colour - magnitude of the maximum eigenvalue(s) between 0.9 and 1
# Green colours - magnitude of the maximum eigenvalue(s) between 0.9 and 0.5
# Blue colour - magnitude of the maximum eigenvalue(s) below 0.5
i := 0 .. m - 1
MM[i + 1, i] := λy
i := m .. d - 1
MM[i + 1, i] := λs
# Area below blue line reperesents elastic |Er|>1 (compensatory) range of SRR,
# area above this line represents inelastic |Er|<1(overcompensatory) range of SRR
# Blue (unit elasticity) line condition |Er|=1 or LRS=aL=e
# Extinction condition LRS<1 , aL<1
# Initial cohorts populations at equilibrium
X[0] := runif(d + 1, 0, 1)  # initiatiation of string
X[0] :=
    for i ∈ 1 .. d
        x[i] ← XS[i]
    x[0] ← XS[0]
    return x
# [component: inputs Maxlym]
# Population dynamics with weak harmonic forcing in stock size at frequency  ω, for time T
X[0] := XS
YRF(T, ω) :=
    for i ∈ 0 .. T
        X[i + 1] ← MM*X[i]
        S ← X[i + 1][0]
        X[i + 1][0] ← a*S*e^(-S/K)*(0.001*sin(2*π*ω*i/T) + 1)
    X  # λy
TT := 2^11 - 1
N := YRF(TT, 137)
t := 0 .. TT
S[t] := sum(N[t][i], i = m .. d)  # Stock size
FS := fft(S)  # Spectrum of the signal (stock size variations)
# λs
# DP - demostration point, for which stock resonance is shown below
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# Stock resonance demonstration at λy=0.85, λs=0.71
Maxlym(0.71, 0.85) = 0.987899  # dominant eigenvalue(s) less than1 (i.e., population dynamically stable)
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(TT + 1)/(141*Tage) = 2.21187
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(TT + 1)/(137*Tage) = 2.27645
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(TT + 1)/(133*Tage) = 2.34492
# Stock resonance creates 2.276*Tage population cycle
(TT + 1)/(2*(2*m - 1)) = 113.778
(TT + 1)/(2*Tage) = 155.937
(TT + 1)/(2*m) = 204.8
# Transfer functions for Moran-Ricker SRR for d and infinite number of cohorts
# Dominant eigenvalue(s) magnitude plot (right) vs. TFIP (Transfer Function Integral plot) (left) for populations with 5 imature cohorts and  11, 21, 31 total number of cohorts (from top to down)
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TR1(f, L, a) := (λy^m - λs^(d + 1 - m)*λy^m*e^(-2i*f*π*(d - m + 1)))/((ln(L*a) - 1)*λy^m + (e^(2i*π*f*m) - λs*e^(2i*π*f*(m - 1)))*L + (1 - ln(L*a))*(λs^(d + 1 - m)*λy^m*e^(-2i*f*π*(d - m + 1))))
TR(f, Lin, a) := λy^m/((ln(Lin*a) - 1)*λy^m + (e^(2i*π*f*m) - λs*e^(2i*π*f*(m - 1)))*Lin)
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# Effect of spectral characteristics of enviromental fluctuations (blue, white and red noises) TFIP (Transfer Function Integral plot)
# for population with m=5, d=30
# Blue | White | Red
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# Red noise increases cohort reasonance, Blue noise increases stock resonsnce
